*Heading
** Job name: Job-1 Model name: Job-1
** Generated by: Abaqus/CAE 2017
*Preprint, echo=NO, model=NO, history=NO, contact=NO
**
** PARTS
**
*Part, name=PART-2
*Node
      1,           0., 0.0560468435, 0.000199999995
      2,           0., 0.00499999989, 0.000199999995
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*Element, type=C3D8RT
  1,   8,  68, 323,  90,   1,  15, 215,  56
  2,  68,  67, 324, 323,  15,  16, 216, 215
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*Nset, nset=SET-1, generate
   1,  866,    1
*Elset, elset=SET-1, generate
   1,  394,    1
** Tang (29-Jan-18): "_Surf-1_S2" has no link with BC.
*Elset, elset=_SURF-1_S2, internal, generate
 131,  150,    1
*Surface, type=ELEMENT, name=SURF-1
_SURF-1_S2, S2
** Section: Elements_all
*Solid Section, elset=SET-1, material=CP
*HOURGLASS STIFFNESS
205
** *Solid Section, elset=SET-1, material=Elasticity
*End Part
**
**
** ASSEMBLY
**
*Assembly, name=Assembly
**
*Instance, name=PART-2-1, part=PART-2
*End Instance
**
*Nset, nset=ALL, instance=PART-2-1, generate
   1,  866,    1
*Elset, elset=ALL, instance=PART-2-1, generate
   1,  394,    1
*Nset, nset=BACK, instance=PART-2-1
   5,   6,   7,   8,  11,  12
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*Elset, elset=BACK, instance=PART-2-1, generate
   1,  394,    1
*Nset, nset=CRACK, instance=PART-2-1
   2,   5,   9,  12,  13,  14
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*Elset, elset=CRACK, instance=PART-2-1
 131, 151, 171, 191, 211, 231
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*Nset, nset=FRONT, instance=PART-2-1
   1,   2,   3,   4,   9,  10
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*Elset, elset=FRONT, instance=PART-2-1, generate
   1,  394,    1
*Nset, nset=OUTER, instance=PART-2-1
   9,  10,  11,  12,  99, 100
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*Elset, elset=OUTER, instance=PART-2-1, generate
 131,  150,    1
*Nset, nset=SYM, instance=PART-2-1
   3,   4,   6,   7,  10,  11
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*Elset, elset=SYM, instance=PART-2-1
 118, 119, 120, 121, 122, 123
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*Nset, nset=TIP, instance=PART-2-1
  2,  3,  5,  6, 27, 28
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*Elset, elset=TIP, instance=PART-2-1, generate
  13,  130,   13
*End Assembly
*Amplitude, name=Amp-1, definition=SMOOTH STEP
             0.,              0.,              1000.,              1.
**
** materials
**
*material, name=CP
*depvar
    200,
*user material, constants=8
 1.570800, 0.785400, 0.000000, 1, 1, 1, 1, 1
*user output variables
     20,
*user material, constants=1, type=THERMAL
1.,
*Density
1.,
*Material, name=Elasticity
*Elastic
193000., 0.2565
** ----------------------------------------------------------------
**
** STEP: Step1
**
*Step, name=Step1, nlgeom=YES, inc=200000000
*Coupled Temperature-displacement, creep=none, DELTMX=2.1e12
 0.0001, 51, 1e-30, 0.03
*CONTROLS,PARAMETERS=TIME INCREMENTATION
 20,20,9,15,15,15,12,90,3,10
 0.5,0.5,0.75,0.85,0.25,0.25,1.5
**
** BOUNDARY CONDITIONS
**
*Boundary, USER
outer, 1, 3
** Name: Disp-BC-1 Type: Symmetry/Antisymmetry/Encastre
*Boundary
sym, YSYMM
** Name: Disp-BC-2 Type: Displacement/Rotation
*Boundary
back, 3, 3
** Name: Disp-BC-3 Type: Displacement/Rotation
*Boundary
front, 3, 3
** Name: Temp-BC-1 Type: Temperature
*Boundary
crack, 11, 11, 2.084e+12
** Name: Temp-BC-2 Type: Temperature
*Boundary
tip, 11, 11, 2.084e+12
**
** OUTPUT REQUESTS
**
*Restart, write, frequency=99999
*Output, field, time interval=1.0
*Node Output
 U, RF, COORD
*Element Output
 E, S, SDV, TEMP, UVARM, PE, TRIAX
*Output, history, frequency=99999
*End Step
** ----------------------------------------------------------------
**
** STEP: Step2
**
*Step, name=Step2, nlgeom=YES, inc=200000000
*Coupled Temperature-displacement, creep=none, DELTMX=2.1e12
 0.0001, 9, 1e-30, 0.03
*CONTROLS,PARAMETERS=TIME INCREMENTATION
 20,20,9,15,15,15,12,90,3,10
 0.5,0.5,0.75,0.85,0.25,0.25,1.5
**
** BOUNDARY CONDITIONS
**
*Boundary, USER
outer, 1, 3
** Name: Disp-BC-1 Type: Symmetry/Antisymmetry/Encastre
*Boundary
sym, YSYMM
** Name: Disp-BC-2 Type: Displacement/Rotation
*Boundary
back, 3, 3
** Name: Disp-BC-3 Type: Displacement/Rotation
*Boundary
front, 3, 3
** Name: Temp-BC-1 Type: Temperature
*Boundary
crack, 11, 11, 2.084e+12
** Name: Temp-BC-2 Type: Temperature
*Boundary
tip, 11, 11, 2.084e+12
**
** OUTPUT REQUESTS
**
*Restart, write, frequency=99999
*Output, field, time interval=1.0
*Node Output
 U, RF, COORD
*Element Output
 E, S, SDV, TEMP, UVARM, PE, TRIAX
*Output, history, frequency=99999
*End Step
** ----------------------------------------------------------------
**
** STEP: Step3
**
*Step, name=Step3, nlgeom=YES, inc=200000000
*Coupled Temperature-displacement, creep=none, DELTMX=2.1e12
 0.0001, 51, 1e-30, 0.03
*CONTROLS,PARAMETERS=TIME INCREMENTATION
 20,20,9,15,15,15,12,90,3,10
 0.5,0.5,0.75,0.85,0.25,0.25,1.5
**
** BOUNDARY CONDITIONS
**
*Boundary, USER
outer, 1, 3
** Name: Disp-BC-1 Type: Symmetry/Antisymmetry/Encastre
*Boundary
sym, YSYMM
** Name: Disp-BC-2 Type: Displacement/Rotation
*Boundary
back, 3, 3
** Name: Disp-BC-3 Type: Displacement/Rotation
*Boundary
front, 3, 3
** Name: Temp-BC-1 Type: Temperature
*Boundary
crack, 11, 11, 2.084e+12
** Name: Temp-BC-2 Type: Temperature
*Boundary
tip, 11, 11, 2.084e+12
**
** OUTPUT REQUESTS
**
*Restart, write, frequency=99999
*Output, field, time interval=1.0
*Node Output
 U, RF, COORD
*Element Output
 E, S, SDV, TEMP, UVARM, PE, TRIAX
*Output, history, frequency=99999
*End Step
** ----------------------------------------------------------------
**
** STEP: Step4
**
*Step, name=Step4, nlgeom=YES, inc=200000000
*Coupled Temperature-displacement, creep=none, DELTMX=2.1e12
 0.0001, 9, 1e-30, 0.03
*CONTROLS,PARAMETERS=TIME INCREMENTATION
 20,20,9,15,15,15,12,90,3,10
 0.5,0.5,0.75,0.85,0.25,0.25,1.5
**
** BOUNDARY CONDITIONS
**
*Boundary, USER
outer, 1, 3
** Name: Disp-BC-1 Type: Symmetry/Antisymmetry/Encastre
*Boundary
sym, YSYMM
** Name: Disp-BC-2 Type: Displacement/Rotation
*Boundary
back, 3, 3
** Name: Disp-BC-3 Type: Displacement/Rotation
*Boundary
front, 3, 3
** Name: Temp-BC-1 Type: Temperature
*Boundary
crack, 11, 11, 2.084e+12
** Name: Temp-BC-2 Type: Temperature
*Boundary
tip, 11, 11, 2.084e+12
**
** OUTPUT REQUESTS
**
*Restart, write, frequency=99999
*Output, field, time interval=1.0
*Node Output
 U, RF, COORD
*Element Output
 E, S, SDV, TEMP, UVARM, PE, TRIAX
*Output, history, frequency=99999
*End Step
** ----------------------------------------------------------------
**
** STEP: Step5
**
*Step, name=Step5, nlgeom=YES, inc=200000000
*Coupled Temperature-displacement, creep=none, DELTMX=2.1e12
 0.0001, 51, 1e-30, 0.03
*CONTROLS,PARAMETERS=TIME INCREMENTATION
 20,20,9,15,15,15,12,90,3,10
 0.5,0.5,0.75,0.85,0.25,0.25,1.5
**
** BOUNDARY CONDITIONS
**
*Boundary, USER
outer, 1, 3
** Name: Disp-BC-1 Type: Symmetry/Antisymmetry/Encastre
*Boundary
sym, YSYMM
** Name: Disp-BC-2 Type: Displacement/Rotation
*Boundary
back, 3, 3
** Name: Disp-BC-3 Type: Displacement/Rotation
*Boundary
front, 3, 3
** Name: Temp-BC-1 Type: Temperature
*Boundary
crack, 11, 11, 2.084e+12
** Name: Temp-BC-2 Type: Temperature
*Boundary
tip, 11, 11, 2.084e+12
**
** OUTPUT REQUESTS
**
*Restart, write, frequency=99999
*Output, field, time interval=1.0
*Node Output
 U, RF, COORD
*Element Output
 E, S, SDV, TEMP, UVARM, PE, TRIAX
*Output, history, frequency=99999
*End Step
** ----------------------------------------------------------------
**
** STEP: Step6
**
*Step, name=Step6, nlgeom=YES, inc=200000000
*Coupled Temperature-displacement, creep=none, DELTMX=2.1e12
 0.0001, 9, 1e-30, 0.03
*CONTROLS,PARAMETERS=TIME INCREMENTATION
 20,20,9,15,15,15,12,90,3,10
 0.5,0.5,0.75,0.85,0.25,0.25,1.5
**
** BOUNDARY CONDITIONS
**
*Boundary, USER
outer, 1, 3
** Name: Disp-BC-1 Type: Symmetry/Antisymmetry/Encastre
*Boundary
sym, YSYMM
** Name: Disp-BC-2 Type: Displacement/Rotation
*Boundary
back, 3, 3
** Name: Disp-BC-3 Type: Displacement/Rotation
*Boundary
front, 3, 3
** Name: Temp-BC-1 Type: Temperature
*Boundary
crack, 11, 11, 2.084e+12
** Name: Temp-BC-2 Type: Temperature
*Boundary
tip, 11, 11, 2.084e+12
**
** OUTPUT REQUESTS
**
*Restart, write, frequency=99999
*Output, field, time interval=1.0
*Node Output
 U, RF, COORD
*Element Output
 E, S, SDV, TEMP, UVARM, PE, TRIAX
*Output, history, frequency=99999
*End Step
** ----------------------------------------------------------------
**
** STEP: Step7
**
*Step, name=Step7, nlgeom=YES, inc=200000000
*Coupled Temperature-displacement, creep=none, DELTMX=2.1e12
 0.0001, 51, 1e-30, 0.03
*CONTROLS,PARAMETERS=TIME INCREMENTATION
 20,20,9,15,15,15,12,90,3,10
 0.5,0.5,0.75,0.85,0.25,0.25,1.5
**
** BOUNDARY CONDITIONS
**
*Boundary, USER
outer, 1, 3
** Name: Disp-BC-1 Type: Symmetry/Antisymmetry/Encastre
*Boundary
sym, YSYMM
** Name: Disp-BC-2 Type: Displacement/Rotation
*Boundary
back, 3, 3
** Name: Disp-BC-3 Type: Displacement/Rotation
*Boundary
front, 3, 3
** Name: Temp-BC-1 Type: Temperature
*Boundary
crack, 11, 11, 2.084e+12
** Name: Temp-BC-2 Type: Temperature
*Boundary
tip, 11, 11, 2.084e+12
**
** OUTPUT REQUESTS
**
*Restart, write, frequency=99999
*Output, field, time interval=1.0
*Node Output
 U, RF, COORD
*Element Output
 E, S, SDV, TEMP, UVARM, PE, TRIAX
*Output, history, frequency=99999
*End Step
** ----------------------------------------------------------------
**
** STEP: Step8
**
*Step, name=Step8, nlgeom=YES, inc=200000000
*Coupled Temperature-displacement, creep=none, DELTMX=2.1e12
 0.0001, 9, 1e-30, 0.03
*CONTROLS,PARAMETERS=TIME INCREMENTATION
 20,20,9,15,15,15,12,90,3,10
 0.5,0.5,0.75,0.85,0.25,0.25,1.5
**
** BOUNDARY CONDITIONS
**
*Boundary, USER
outer, 1, 3
** Name: Disp-BC-1 Type: Symmetry/Antisymmetry/Encastre
*Boundary
sym, YSYMM
** Name: Disp-BC-2 Type: Displacement/Rotation
*Boundary
back, 3, 3
** Name: Disp-BC-3 Type: Displacement/Rotation
*Boundary
front, 3, 3
** Name: Temp-BC-1 Type: Temperature
*Boundary
crack, 11, 11, 2.084e+12
** Name: Temp-BC-2 Type: Temperature
*Boundary
tip, 11, 11, 2.084e+12
**
** OUTPUT REQUESTS
**
*Restart, write, frequency=99999
*Output, field, time interval=1.0
*Node Output
 U, RF, COORD
*Element Output
 E, S, SDV, TEMP, UVARM, PE, TRIAX
*Output, history, frequency=99999
*End Step
** ----------------------------------------------------------------
**
** STEP: Step9
**
*Step, name=Step9, nlgeom=YES, inc=200000000
*Coupled Temperature-displacement, creep=none, DELTMX=2.1e12
 0.0001, 51, 1e-30, 0.03
*CONTROLS,PARAMETERS=TIME INCREMENTATION
 20,20,9,15,15,15,12,90,3,10
 0.5,0.5,0.75,0.85,0.25,0.25,1.5
**
** BOUNDARY CONDITIONS
**
*Boundary, USER
outer, 1, 3
** Name: Disp-BC-1 Type: Symmetry/Antisymmetry/Encastre
*Boundary
sym, YSYMM
** Name: Disp-BC-2 Type: Displacement/Rotation
*Boundary
back, 3, 3
** Name: Disp-BC-3 Type: Displacement/Rotation
*Boundary
front, 3, 3
** Name: Temp-BC-1 Type: Temperature
*Boundary
crack, 11, 11, 2.084e+12
** Name: Temp-BC-2 Type: Temperature
*Boundary
tip, 11, 11, 2.084e+12
**
** OUTPUT REQUESTS
**
*Restart, write, frequency=99999
*Output, field, time interval=1.0
*Node Output
 U, RF, COORD
*Element Output
 E, S, SDV, TEMP, UVARM, PE, TRIAX
*Output, history, frequency=99999
*End Step
** ----------------------------------------------------------------
**
** STEP: Step10
**
*Step, name=Step10, nlgeom=YES, inc=200000000
*Coupled Temperature-displacement, creep=none, DELTMX=2.1e12
 0.0001, 9, 1e-30, 0.03
*CONTROLS,PARAMETERS=TIME INCREMENTATION
 20,20,9,15,15,15,12,90,3,10
 0.5,0.5,0.75,0.85,0.25,0.25,1.5
**
** BOUNDARY CONDITIONS
**
*Boundary, USER
outer, 1, 3
** Name: Disp-BC-1 Type: Symmetry/Antisymmetry/Encastre
*Boundary
sym, YSYMM
** Name: Disp-BC-2 Type: Displacement/Rotation
*Boundary
back, 3, 3
** Name: Disp-BC-3 Type: Displacement/Rotation
*Boundary
front, 3, 3
** Name: Temp-BC-1 Type: Temperature
*Boundary
crack, 11, 11, 2.084e+12
** Name: Temp-BC-2 Type: Temperature
*Boundary
tip, 11, 11, 2.084e+12
**
** OUTPUT REQUESTS
**
*Restart, write, frequency=99999
*Output, field, time interval=1.0
*Node Output
 U, RF, COORD
*Element Output
 E, S, SDV, TEMP, UVARM, PE, TRIAX
*Output, history, frequency=99999
*End Step
** ----------------------------------------------------------------
**
** STEP: Step11
**
*Step, name=Step11, nlgeom=YES, inc=200000000
*Coupled Temperature-displacement, creep=none, DELTMX=2.1e12
 0.0001, 51, 1e-30, 0.03
*CONTROLS,PARAMETERS=TIME INCREMENTATION
 20,20,9,15,15,15,12,90,3,10
 0.5,0.5,0.75,0.85,0.25,0.25,1.5
**
** BOUNDARY CONDITIONS
**
*Boundary, USER
outer, 1, 3
** Name: Disp-BC-1 Type: Symmetry/Antisymmetry/Encastre
*Boundary
sym, YSYMM
** Name: Disp-BC-2 Type: Displacement/Rotation
*Boundary
back, 3, 3
** Name: Disp-BC-3 Type: Displacement/Rotation
*Boundary
front, 3, 3
** Name: Temp-BC-1 Type: Temperature
*Boundary
crack, 11, 11, 2.084e+12
** Name: Temp-BC-2 Type: Temperature
*Boundary
tip, 11, 11, 2.084e+12
**
** OUTPUT REQUESTS
**
*Restart, write, frequency=99999
*Output, field, time interval=1.0
*Node Output
 U, RF, COORD
*Element Output
 E, S, SDV, TEMP, UVARM, PE, TRIAX
*Output, history, frequency=99999
*End Step
** ----------------------------------------------------------------
**
** STEP: Step12
**
*Step, name=Step12, nlgeom=YES, inc=200000000
*Coupled Temperature-displacement, creep=none, DELTMX=2.1e12
 0.0001, 9, 1e-30, 0.03
*CONTROLS,PARAMETERS=TIME INCREMENTATION
 20,20,9,15,15,15,12,90,3,10
 0.5,0.5,0.75,0.85,0.25,0.25,1.5
**
** BOUNDARY CONDITIONS
**
*Boundary, USER
outer, 1, 3
** Name: Disp-BC-1 Type: Symmetry/Antisymmetry/Encastre
*Boundary
sym, YSYMM
** Name: Disp-BC-2 Type: Displacement/Rotation
*Boundary
back, 3, 3
** Name: Disp-BC-3 Type: Displacement/Rotation
*Boundary
front, 3, 3
** Name: Temp-BC-1 Type: Temperature
*Boundary
crack, 11, 11, 2.084e+12
** Name: Temp-BC-2 Type: Temperature
*Boundary
tip, 11, 11, 2.084e+12
**
** OUTPUT REQUESTS
**
*Restart, write, frequency=99999
*Output, field, time interval=1.0
*Node Output
 U, RF, COORD
*Element Output
 E, S, SDV, TEMP, UVARM, PE, TRIAX
*Output, history, frequency=99999
*End Step
** ----------------------------------------------------------------
**
** STEP: Step13
**
*Step, name=Step13, nlgeom=YES, inc=200000000
*Coupled Temperature-displacement, creep=none, DELTMX=2.1e12
 0.0001, 51, 1e-30, 0.03
*CONTROLS,PARAMETERS=TIME INCREMENTATION
 20,20,9,15,15,15,12,90,3,10
 0.5,0.5,0.75,0.85,0.25,0.25,1.5
**
** BOUNDARY CONDITIONS
**
*Boundary, USER
outer, 1, 3
** Name: Disp-BC-1 Type: Symmetry/Antisymmetry/Encastre
*Boundary
sym, YSYMM
** Name: Disp-BC-2 Type: Displacement/Rotation
*Boundary
back, 3, 3
** Name: Disp-BC-3 Type: Displacement/Rotation
*Boundary
front, 3, 3
** Name: Temp-BC-1 Type: Temperature
*Boundary
crack, 11, 11, 2.084e+12
** Name: Temp-BC-2 Type: Temperature
*Boundary
tip, 11, 11, 2.084e+12
**
** OUTPUT REQUESTS
**
*Restart, write, frequency=99999
*Output, field, time interval=1.0
*Node Output
 U, RF, COORD
*Element Output
 E, S, SDV, TEMP, UVARM, PE, TRIAX
*Output, history, frequency=99999
*End Step
** ----------------------------------------------------------------
**
** STEP: Step14
**
*Step, name=Step14, nlgeom=YES, inc=200000000
*Coupled Temperature-displacement, creep=none, DELTMX=2.1e12
 0.0001, 9, 1e-30, 0.03
*CONTROLS,PARAMETERS=TIME INCREMENTATION
 20,20,9,15,15,15,12,90,3,10
 0.5,0.5,0.75,0.85,0.25,0.25,1.5
**
** BOUNDARY CONDITIONS
**
*Boundary, USER
outer, 1, 3
** Name: Disp-BC-1 Type: Symmetry/Antisymmetry/Encastre
*Boundary
sym, YSYMM
** Name: Disp-BC-2 Type: Displacement/Rotation
*Boundary
back, 3, 3
** Name: Disp-BC-3 Type: Displacement/Rotation
*Boundary
front, 3, 3
** Name: Temp-BC-1 Type: Temperature
*Boundary
crack, 11, 11, 2.084e+12
** Name: Temp-BC-2 Type: Temperature
*Boundary
tip, 11, 11, 2.084e+12
**
** OUTPUT REQUESTS
**
*Restart, write, frequency=99999
*Output, field, time interval=1.0
*Node Output
 U, RF, COORD
*Element Output
 E, S, SDV, TEMP, UVARM, PE, TRIAX
*Output, history, frequency=99999
*End Step
** ----------------------------------------------------------------
**
** STEP: Step15
**
*Step, name=Step15, nlgeom=YES, inc=200000000
*Coupled Temperature-displacement, creep=none, DELTMX=2.1e12
 0.0001, 51, 1e-30, 0.03
*CONTROLS,PARAMETERS=TIME INCREMENTATION
 20,20,9,15,15,15,12,90,3,10
 0.5,0.5,0.75,0.85,0.25,0.25,1.5
**
** BOUNDARY CONDITIONS
**
*Boundary, USER
outer, 1, 3
** Name: Disp-BC-1 Type: Symmetry/Antisymmetry/Encastre
*Boundary
sym, YSYMM
** Name: Disp-BC-2 Type: Displacement/Rotation
*Boundary
back, 3, 3
** Name: Disp-BC-3 Type: Displacement/Rotation
*Boundary
front, 3, 3
** Name: Temp-BC-1 Type: Temperature
*Boundary
crack, 11, 11, 2.084e+12
** Name: Temp-BC-2 Type: Temperature
*Boundary
tip, 11, 11, 2.084e+12
**
** OUTPUT REQUESTS
**
*Restart, write, frequency=99999
*Output, field, time interval=1.0
*Node Output
 U, RF, COORD
*Element Output
 E, S, SDV, TEMP, UVARM, PE, TRIAX
*Output, history, frequency=99999
*End Step
** ----------------------------------------------------------------
**
** STEP: Step16
**
*Step, name=Step16, nlgeom=YES, inc=200000000
*Coupled Temperature-displacement, creep=none, DELTMX=2.1e12
 0.0001, 9, 1e-30, 0.03
*CONTROLS,PARAMETERS=TIME INCREMENTATION
 20,20,9,15,15,15,12,90,3,10
 0.5,0.5,0.75,0.85,0.25,0.25,1.5
**
** BOUNDARY CONDITIONS
**
*Boundary, USER
outer, 1, 3
** Name: Disp-BC-1 Type: Symmetry/Antisymmetry/Encastre
*Boundary
sym, YSYMM
** Name: Disp-BC-2 Type: Displacement/Rotation
*Boundary
back, 3, 3
** Name: Disp-BC-3 Type: Displacement/Rotation
*Boundary
front, 3, 3
** Name: Temp-BC-1 Type: Temperature
*Boundary
crack, 11, 11, 2.084e+12
** Name: Temp-BC-2 Type: Temperature
*Boundary
tip, 11, 11, 2.084e+12
**
** OUTPUT REQUESTS
**
*Restart, write, frequency=99999
*Output, field, time interval=1.0
*Node Output
 U, RF, COORD
*Element Output
 E, S, SDV, TEMP, UVARM, PE, TRIAX
*Output, history, frequency=99999
*End Step
** ----------------------------------------------------------------
**
** STEP: Step17
**
*Step, name=Step17, nlgeom=YES, inc=200000000
*Coupled Temperature-displacement, creep=none, DELTMX=2.1e12
 0.0001, 51, 1e-30, 0.03
*CONTROLS,PARAMETERS=TIME INCREMENTATION
 20,20,9,15,15,15,12,90,3,10
 0.5,0.5,0.75,0.85,0.25,0.25,1.5
**
** BOUNDARY CONDITIONS
**
*Boundary, USER
outer, 1, 3
** Name: Disp-BC-1 Type: Symmetry/Antisymmetry/Encastre
*Boundary
sym, YSYMM
** Name: Disp-BC-2 Type: Displacement/Rotation
*Boundary
back, 3, 3
** Name: Disp-BC-3 Type: Displacement/Rotation
*Boundary
front, 3, 3
** Name: Temp-BC-1 Type: Temperature
*Boundary
crack, 11, 11, 2.084e+12
** Name: Temp-BC-2 Type: Temperature
*Boundary
tip, 11, 11, 2.084e+12
**
** OUTPUT REQUESTS
**
*Restart, write, frequency=99999
*Output, field, time interval=1.0
*Node Output
 U, RF, COORD
*Element Output
 E, S, SDV, TEMP, UVARM, PE, TRIAX
*Output, history, frequency=99999
*End Step
** ----------------------------------------------------------------
**
** STEP: Step18
**
*Step, name=Step18, nlgeom=YES, inc=200000000
*Coupled Temperature-displacement, creep=none, DELTMX=2.1e12
 0.0001, 9, 1e-30, 0.03
*CONTROLS,PARAMETERS=TIME INCREMENTATION
 20,20,9,15,15,15,12,90,3,10
 0.5,0.5,0.75,0.85,0.25,0.25,1.5
**
** BOUNDARY CONDITIONS
**
*Boundary, USER
outer, 1, 3
** Name: Disp-BC-1 Type: Symmetry/Antisymmetry/Encastre
*Boundary
sym, YSYMM
** Name: Disp-BC-2 Type: Displacement/Rotation
*Boundary
back, 3, 3
** Name: Disp-BC-3 Type: Displacement/Rotation
*Boundary
front, 3, 3
** Name: Temp-BC-1 Type: Temperature
*Boundary
crack, 11, 11, 2.084e+12
** Name: Temp-BC-2 Type: Temperature
*Boundary
tip, 11, 11, 2.084e+12
**
** OUTPUT REQUESTS
**
*Restart, write, frequency=99999
*Output, field, time interval=1.0
*Node Output
 U, RF, COORD
*Element Output
 E, S, SDV, TEMP, UVARM, PE, TRIAX
*Output, history, frequency=99999
*End Step
** ----------------------------------------------------------------
**
** STEP: Step19
**
*Step, name=Step19, nlgeom=YES, inc=200000000
*Coupled Temperature-displacement, creep=none, DELTMX=2.1e12
 0.0001, 51, 1e-30, 0.03
*CONTROLS,PARAMETERS=TIME INCREMENTATION
 20,20,9,15,15,15,12,90,3,10
 0.5,0.5,0.75,0.85,0.25,0.25,1.5
**
** BOUNDARY CONDITIONS
**
*Boundary, USER
outer, 1, 3
** Name: Disp-BC-1 Type: Symmetry/Antisymmetry/Encastre
*Boundary
sym, YSYMM
** Name: Disp-BC-2 Type: Displacement/Rotation
*Boundary
back, 3, 3
** Name: Disp-BC-3 Type: Displacement/Rotation
*Boundary
front, 3, 3
** Name: Temp-BC-1 Type: Temperature
*Boundary
crack, 11, 11, 2.084e+12
** Name: Temp-BC-2 Type: Temperature
*Boundary
tip, 11, 11, 2.084e+12
**
** OUTPUT REQUESTS
**
*Restart, write, frequency=99999
*Output, field, time interval=1.0
*Node Output
 U, RF, COORD
*Element Output
 E, S, SDV, TEMP, UVARM, PE, TRIAX
*Output, history, frequency=99999
*End Step
** ----------------------------------------------------------------
**
** STEP: Step20
**
*Step, name=Step20, nlgeom=YES, inc=200000000
*Coupled Temperature-displacement, creep=none, DELTMX=2.1e12
 0.0001, 9, 1e-30, 0.03
*CONTROLS,PARAMETERS=TIME INCREMENTATION
 20,20,9,15,15,15,12,90,3,10
 0.5,0.5,0.75,0.85,0.25,0.25,1.5
**
** BOUNDARY CONDITIONS
**
*Boundary, USER
outer, 1, 3
** Name: Disp-BC-1 Type: Symmetry/Antisymmetry/Encastre
*Boundary
sym, YSYMM
** Name: Disp-BC-2 Type: Displacement/Rotation
*Boundary
back, 3, 3
** Name: Disp-BC-3 Type: Displacement/Rotation
*Boundary
front, 3, 3
** Name: Temp-BC-1 Type: Temperature
*Boundary
crack, 11, 11, 2.084e+12
** Name: Temp-BC-2 Type: Temperature
*Boundary
tip, 11, 11, 2.084e+12
**
** OUTPUT REQUESTS
**
*Restart, write, frequency=99999
*Output, field, time interval=1.0
*Node Output
 U, RF, COORD
*Element Output
 E, S, SDV, TEMP, UVARM, PE, TRIAX
*Output, history, frequency=99999
*End Step
** ----------------------------------------------------------------
**
** STEP: Step21
**
*Step, name=Step21, nlgeom=YES, inc=200000000
*Coupled Temperature-displacement, creep=none, DELTMX=2.1e12
 0.0001, 51, 1e-30, 0.03
*CONTROLS,PARAMETERS=TIME INCREMENTATION
 20,20,9,15,15,15,12,90,3,10
 0.5,0.5,0.75,0.85,0.25,0.25,1.5
**
** BOUNDARY CONDITIONS
**
*Boundary, USER
outer, 1, 3
** Name: Disp-BC-1 Type: Symmetry/Antisymmetry/Encastre
*Boundary
sym, YSYMM
** Name: Disp-BC-2 Type: Displacement/Rotation
*Boundary
back, 3, 3
** Name: Disp-BC-3 Type: Displacement/Rotation
*Boundary
front, 3, 3
** Name: Temp-BC-1 Type: Temperature
*Boundary
crack, 11, 11, 2.084e+12
** Name: Temp-BC-2 Type: Temperature
*Boundary
tip, 11, 11, 2.084e+12
**
** OUTPUT REQUESTS
**
*Restart, write, frequency=99999
*Output, field, time interval=1.0
*Node Output
 U, RF, COORD
*Element Output
 E, S, SDV, TEMP, UVARM, PE, TRIAX
*Output, history, frequency=99999
*End Step
** ----------------------------------------------------------------
**
** STEP: Step22
**
*Step, name=Step22, nlgeom=YES, inc=200000000
*Coupled Temperature-displacement, creep=none, DELTMX=2.1e12
 0.0001, 9, 1e-30, 0.03
*CONTROLS,PARAMETERS=TIME INCREMENTATION
 20,20,9,15,15,15,12,90,3,10
 0.5,0.5,0.75,0.85,0.25,0.25,1.5
**
** BOUNDARY CONDITIONS
**
*Boundary, USER
outer, 1, 3
** Name: Disp-BC-1 Type: Symmetry/Antisymmetry/Encastre
*Boundary
sym, YSYMM
** Name: Disp-BC-2 Type: Displacement/Rotation
*Boundary
back, 3, 3
** Name: Disp-BC-3 Type: Displacement/Rotation
*Boundary
front, 3, 3
** Name: Temp-BC-1 Type: Temperature
*Boundary
crack, 11, 11, 2.084e+12
** Name: Temp-BC-2 Type: Temperature
*Boundary
tip, 11, 11, 2.084e+12
**
** OUTPUT REQUESTS
**
*Restart, write, frequency=99999
*Output, field, time interval=1.0
*Node Output
 U, RF, COORD
*Element Output
 E, S, SDV, TEMP, UVARM, PE, TRIAX
*Output, history, frequency=99999
*End Step
** ----------------------------------------------------------------
**
** STEP: Step23
**
*Step, name=Step23, nlgeom=YES, inc=200000000
*Coupled Temperature-displacement, creep=none, DELTMX=2.1e12
 0.0001, 51, 1e-30, 0.03
*CONTROLS,PARAMETERS=TIME INCREMENTATION
 20,20,9,15,15,15,12,90,3,10
 0.5,0.5,0.75,0.85,0.25,0.25,1.5
**
** BOUNDARY CONDITIONS
**
*Boundary, USER
outer, 1, 3
** Name: Disp-BC-1 Type: Symmetry/Antisymmetry/Encastre
*Boundary
sym, YSYMM
** Name: Disp-BC-2 Type: Displacement/Rotation
*Boundary
back, 3, 3
** Name: Disp-BC-3 Type: Displacement/Rotation
*Boundary
front, 3, 3
** Name: Temp-BC-1 Type: Temperature
*Boundary
crack, 11, 11, 2.084e+12
** Name: Temp-BC-2 Type: Temperature
*Boundary
tip, 11, 11, 2.084e+12
**
** OUTPUT REQUESTS
**
*Restart, write, frequency=99999
*Output, field, time interval=1.0
*Node Output
 U, RF, COORD
*Element Output
 E, S, SDV, TEMP, UVARM, PE, TRIAX
*Output, history, frequency=99999
*End Step
